! пример использования макроса *use, Vectorization.mac, ARG1, ARG2, ARG3
! имя данного тестового макроса:
!    *use, _TEST_Vectorization.mac
!!!!!!!!!!!!!!!!!!!!!!!!!!!!!!!!!!!!!!!!!!!!!!!!!!!!!!!!!!!!!!!!!!!!!!!!!!!!!!!!!!!!!!!!!!!!!!!!!!!!!!!!!!!!!!!!!!!!!!!!
!
FINISH                               ! 1. Очистка базы данных на случай повторного
/CLEAR,NOSTART                       !    использования данного примера.
/PREP7                               ! 2. Вход в меню препроцессора.
*DIM, MyData, ARRAY, 8, 3, 1         ! 3. Создание массива с исходными данными;
*VFILL, MyData(1,1,1), RAMP, 11, 1   !    исходные данные создаются путём заполнения
*VFILL, MyData(1,2,1), RAMP, 21, 1   !    соответствующих столбцов (векторов) массива;
*VFILL, MyData(1,3,1), RAMP, 31, 1   !
                                     !
*use, Vectorization.mac, 'INIT'      ! 4. Инициализация (первый запуск) макроса, назначение
                                     !    которого - векторизовать исходный массив размером
                                     !    MxN в массив Mx1.
v_ArrayName(1) = 'MyData'            ! 5. После инициализации необходимо переменной
                                     !    v_ArrayName(1) присвоить строку с именем массива,
									 !    предназначенного для векторизации.
									 !
									 !    Примечание! Длина строки с именем массива должна
									 !    быть меньше или равна 32 символам.
									 !
*use, Vectorization.mac, 'PREPARE'   ! 6. Производится обязательная подготовка параметров
                                     !    и массивов, обеспечивающих работу макроса.
									 !
									 !    Внимание! Данная процедура выполняется
									 !    после каждого изменения значения имени массива
									 !    для векторизации в переменной v_ArrayName(1).
									 !
*use, Vectorization.mac, 'PROCESS', 'ROW', 1 ! 7. Выполняется функция векторизации по
                                     !    методу "СТРОКА" ('ROW') для первой (ARG3 = 1)
									 !    плоскости (Plane) массива.
									 !    Результаты помещаются в массив v_Result(1).
*VFUN, RowMethodOut, COPY, v_Result(1) ! 8. Копирование результатов.
                                     !
*DIM, AnotherData, ARRAY, 5, 2, 2    ! 9.  Массив исходных данных для векторизации
                                     !     по методу "СТОЛБЕЦ" ('COLUMN')
*VFILL, AnotherData(1,1,2), RAMP, 11, 1 !  Исходные данные создаются аналогичным способом,
*VFILL, AnotherData(1,2,2), RAMP, 21, 1	!  описанный в пункте 3.
                                     !
v_ArrayName(1) = 'AnotherData' 		 ! 10. Присвоение переменной v_ArrayName(1) строки,
                                     !     содержащей имя нового массива для векторизации.
*use, Vectorization.mac, 'PREPARE'   ! 11. Подготовка параметров и массивов, обеспечивающих
                                     !     работу макроса.
*use, Vectorization.mac, 'PROCESS', 'COLUMN', 2 ! 12. Выполняется функция векторизации по
                                     !     методу "СТОЛБЕЦ" для второй (ARG3 = 2) плоскости
									 !     массива.
*VFUN, ColumnMethodOut, COPY, v_Result(1) ! 13. Копирование результатов.
                                     !
*use, Vectorization.mac, 'ERASE'	 ! 14. Очистка памяти от массивов и параметров,
                                     !     связанных с работой макроса Vectorization.mac
									 !
                                     !	   Внимание! В том числе удаляется и массив
									 !     с результатами v_Result(1).
